*Heading
** Job name: Job-1 Model name: Model-1
** Generated by: Abaqus/CAE 2018
*Preprint, echo=NO, model=NO, history=NO, contact=NO
**
** PARTS
**
*Part, name=Part-1
*Node
      1,           0., -0.120000005
      2,           0., -0.200000003
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*Element, type=CPS8R
   1,    1,    8,  176,   91, 1106, 1107, 1108, 1109
   2,    8,    9,  177,  176, 1110, 1111, 1112, 1107
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*Nset, nset=Set-6, generate
    1,  3233,     1
*Elset, elset=Set-6, generate
    1,  1024,     1
*Elset, elset=ss, generate
    1,  1024,     1
*Nset, nset=load-set
  5, 92, 93, 94
** Section: sldSec
*Solid Section, elset=ss, material=Material01
,
*End Part
**
**
** ASSEMBLY
**
*Assembly, name=Assembly
**
*Instance, name=Part-1-1, part=Part-1
*End Instance
**
*Nset, nset=bc-set, instance=Part-1-1
    6,    7,  138,  139,  140,  141
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*Elset, elset=bc-set, instance=Part-1-1, generate
 1009,  1024,     1
*End Assembly
**
** MATERIALS
**
*Material, name=Material-1
*Elastic
 1e+06, 0.3
*Material, name=Material01
*Elastic
1., 0.3
*Material, name=Material02
*Elastic
 1e-09, 0.3
** ----------------------------------------------------------------
**
** STEP: Step-1
**
*Step, name=Step-1, nlgeom=NO
*Static
1., 1., 1e-05, 1.
**
** BOUNDARY CONDITIONS
**
** Name: BC-1 Type: Displacement/Rotation
*Boundary
bc-set, 1, 1
bc-set, 2, 2
bc-set, 6, 6
**
** LOADS
**
** Name: Load-1   Type: Concentrated force
*Cload
Part-1-1.load-set, 2, -4.
**
** OUTPUT REQUESTS
**
*Restart, write, frequency=0
**
** FIELD OUTPUT: SEDensity
**
*Output, field
*Element Output, directions=YES
ELEDEN,
**
** FIELD OUTPUT: F-Output-1
**
*Output, field, variable=PRESELECT
**
** HISTORY OUTPUT: ExtWork
**
*Output, history
*Energy Output
ALLWK,
**
** HISTORY OUTPUT: H-Output-1
**
*Output, history, variable=PRESELECT
*End Step
